! ***************************************************************************
!   Written by : Femap
!   Version    : 2023.2.0
!   From Model : \\ricerca.lan\Archivio\Idroelettrico\RdS\2024\BW\FEMAP\Reservoir\Tsankov Kamak Reservoir-679.modfem
!   Date       : Thu May 30 10:30:12 2024
! ***************************************************************************

/VIEW,1,0.72246065004,0.61734152466,0.31135197297
/ANGLE,1,256.805059523
/ZOOM,,OFF

/NOPR
/FCOMP,RST,0
/PREP7
!!! ----------------------------------------------------------------


CSYS,0
N,  200000,        -320.204,          496.76,          679.01
N,  200001,        -319.735,         496.238,            675.
N,  200002,        -319.275,         495.724,            671.
N,  200003,        -318.824,          495.22,            667.
N,  200004,         -323.55,          490.75,            663.
N,  200005,        -328.277,          486.28,            659.
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N,  221988,           -700.,         205.397,            679.
!!! ----------------------------------------------------------------

/COM Femap Material 1 : Water
MP,NUXY,1,0.29
!!! ----------------------------------------------------------------

ET, 3, SOLID185, , , , , ,
!!! ----------------------------------------------------------------

SHPP,off,,NOWARN
MAT,1
TYPE,3
ESYS,0
EN,  200000,  200001,  200089,  200088,  200000,  202000,  202088,  202087,  201999
EN,  200001,  202000,  202088,  202087,  201999,  203999,  204087,  204086,  203998
EN,  200002,  200089,  200093,  200092,  200088,  202088,  202092,  202091,  202087
EN,  200003,  202088,  202092,  202091,  202087,  204087,  204091,  204090,  204086
EN,  200004,  203999,  204087,  204086,  203998,  205998,  206086,  206085,  205997
EN,  200005,  204087,  204091,  204090,  204086,  206086,  206090,  206089,  206085
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EN,  219099,  201997,  200073,  200074,  201998,  203996,  202072,  202073,  203997
!!! ----------------------------------------------------------------

!!! ----------------------------------------------------------------

/COM Femap Group 1 : Reservoir
CMBLOCK, Reservoir_Elem, ELEM, 2
(8i10)
    200000   -219099
/COM Femap Group 2 : Node free field
CMBLOCK, Nodefreefield_Node, NODE, 1133
(8i10)
    200000    200074    200088    200092    200096    200101    200106    200112
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!!! ----------------------------------------------------------------

!!! ----------------------------------------------------------------

!!! ----------------------------------------------------------------

!!! ----------------------------------------------------------------

!!! ----------------------------------------------------------------

/GOPR
FINISH

/SOLU
ANTYPE,STATIC,NEW
EQSLV,SPARSE
OUTRES,ALL,ALL,
OUTPR,ALL,ALL,
/COM ===============================================================

FINISH
