** ***************************************************************************
**   Written by : Femap
**   Version    : 2023.2.0
**   From Model : \\ricerca.lan\Archivio\Idroelettrico\RdS\2024\BW\FEMAP\Reservoir\Tsankov Kamak Reservoir-679.modfem
**   Date       : Thu May 30 10:30:53 2024
** ***************************************************************************
**
*HEADING
Tsankov Kamak
*NODE, NSET=GLOBAL
  200000,    -320.204,      496.76,      679.01
  200001,    -319.735,     496.238,        675.
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*ELEMENT, TYPE=C3D8, ELSET=Water
 200000, 200001, 200089, 200088, 200000, 202000, 202088, 202087, 201999
 200001, 202000, 202088, 202087, 201999, 203999, 204087, 204086, 203998
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** Femap Group 1 : Reservoir
*ELSET, ELSET=Reservoir, GENERATE
200000,219099,1
** Femap Group 2 : Node free field
*NSET, NSET=Node_free_field
200000,200074,200088,200092,200096,200101
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*ELSET, ELSET=OUT_CONT, GENERATE
200000,219099,1
** Femap Property 1 : Water
*ORIENTATION, NAME=GLOBAL_0, DEFINITION=COORDINATES, SYSTEM=RECTANGULAR
        1.,        0.,        0.,        0.,        1.,        0.
*SOLID SECTION, ELSET=Water, MATERIAL=Water, ORIENTATION=GLOBAL_0
** Femap Material 1 : Water
*MATERIAL, NAME=Water
*ELASTIC, TYPE=ISOTROPIC
        0.,      0.29,        0.
** Femap Region 1 : Bacino-Diga
*SURFACE, NAME=Bacino-Diga, TYPE=ELEMENT
 200000, S1
 200002, S1
 200006, S1
 200012, S1
 200020, S1
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 219099, S1
** Femap Region 2 : Bacino-Laterale
*SURFACE, NAME=Bacino-Laterale, TYPE=ELEMENT
 200000, S6
 200001, S6
 200004, S6
 200009, S6
 200016, S6
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 219099, S4
** Femap Region 3 : Bacino-Monte
*SURFACE, NAME=Bacino-Monte, TYPE=ELEMENT
 200072, S2
 200073, S2
 200074, S2
 200075, S2
 200076, S2
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 218923, S2
** Load Step 1 -------------------------------------------------------
*STEP, INC=100
Untitled
*STATIC

*EL PRINT, FREQUENCY = 0
*NODE PRINT, FREQUENCY = 0
*FILE FORMAT, ASCII, ZERO INCREMENT
*NODE FILE
    U,
*NODE FILE
   RF,
*EL FILE, ELSET=OUT_CONT, POSITION=CENTROIDAL
    S,
 SINV,
*EL FILE, ELSET=OUT_CONT, POSITION=CENTROIDAL
*EL FILE, ELSET=OUT_CONT, POSITION=CENTROIDAL
    E,
   PE,
   IE,
*END STEP
